DAU := 27*10^6
MAU := 400*10^6
activity_coef := 0.4
# Расчет RPS
# Пользователи
all_users := MAU/activity_coef = 1000000000
RPS_user_create := all_users/((2025 - 2009)*365 day) = 1.98186 1/s
RPS_user_read := DAU/day = 312.5 1/s
RPS_user := RPS_user_create + RPS_user_read = 314.482 1/s
user_rate_create := RPS_user_create = 1.98186 1/s
user_rate_read := RPS_user_read = 312.5 1/s
# Вопросы
questions_per_day_read_by_user := 3
RPS_question_create := 7000/day = 0.0810185 1/s
RPS_question_read := DAU*questions_per_day_read_by_user/day = 937.5 1/s
RPS_question := RPS_question_create + RPS_question_read = 937.581 1/s
question_rate_create := RPS_question_create = 0.0810185 1/s
question_rate_read := RPS_question_read = 937.5 1/s
# Ответы
answer_per_question := 5
RPS_answer_create := RPS_question_create*answer_per_question = 0.405093 1/s
answer_rate_create := RPS_answer_create = 0.405093 1/s
answer_rate_read := answer_per_question*RPS_question_read = 4687.5 1/s
RPS_answer_read := answer_rate_read/answer_per_question = 937.5 1/s
RPS_answer := RPS_answer_create + RPS_answer_read = 937.905 1/s
# Посты
posts_batch := 7
posts_read_per_day_by_user := 14
RPS_post_create := RPS_question_create = 0.0810185 1/s
post_rate_create := RPS_post_create = 0.0810185 1/s
post_rate_read := DAU*posts_read_per_day_by_user/day = 4375 1/s
RPS_post_read := post_rate_read/posts_batch = 625 1/s
post_rate := post_rate_read + RPS_post_create = 4375.08 1/s
RPS_post := RPS_post_create + RPS_post_read = 625.081 1/s
# Комментарии
comments_per_post_feed := 62
comments_per_post_profile := 1.07
comments_per_answer := 17.4
comments_on_read := 5
comments_batch := 5
RPS_comment_create := comments_per_post_feed*RPS_post_create + comments_per_answer*RPS_answer_create = 12.0718 1/s
RPS_comment_read := RPS_post_read + RPS_answer_read = 1562.5 1/s
comment_rate_create := RPS_comment_create = 12.0718 1/s
comment_rate_read := comments_on_read*RPS_post_read + comments_on_read*RPS_answer_read = 7812.5 1/s
comment_rate := comment_rate_read + RPS_comment_create = 7824.57 1/s
RPS_comment := RPS_comment_create + RPS_comment_read = 1574.57 1/s
# Оценки
votes_per_post_feed := 1137
votes_per_post_profile := 17.9
votes_per_answer := 83.7
RPS_post_votes_create := votes_per_post_feed*RPS_post_create = 92.1181 1/s
RPS_answer_votes_create := votes_per_answer*RPS_answer_create = 33.9062 1/s
RPS_votes_create := RPS_post_votes_create + RPS_answer_votes_create = 126.024 1/s
RPS_post_votes_read := RPS_post_read = 625 1/s
RPS_answer_votes_read := RPS_answer_read = 937.5 1/s
RPS_votes_read := RPS_post_votes_read + RPS_answer_votes_read = 1562.5 1/s
post_votes_rate_create := RPS_post_votes_create = 92.1181 1/s
answer_votes_rate_create := RPS_answer_votes_create = 33.9062 1/s
votes_rate_read := post_rate_read + answer_rate_read = 9062.5 1/s
votes_rate_create := post_votes_rate_create + answer_votes_rate_create = 126.024 1/s
votes_request := votes_rate_read + RPS_votes_create = 9188.52 1/s
RPS_votes := RPS_votes_create + RPS_votes_read = 1688.52 1/s
# Сообщества
spaces_per_user := 0.001
all_spaces := spaces_per_user*all_users = 1000000
RPS_space_create := RPS_user_create*spaces_per_user = 0.00198186 1/s
RPS_space_read := RPS_post_read = 625 1/s
space_rate_create := RPS_space_create = 0.00198186 1/s
space_rate_read := post_rate_read = 4375 1/s
RPS_space := RPS_space_create + RPS_space_read = 625.002 1/s
# Суммарный
RPS := RPS_user + RPS_question + RPS_answer + RPS_post + RPS_comment + RPS_votes + RPS_space = 6703.15 1/s
# Расчет трафика
bit := 1
B := 8 bit
Kbit := 1024 bit
KB := 1024 B
Mbit := 1024 Kbit
MB := 1024 KB
GB := 1024 MB
Gbit := 1024 Mbit
TB := 1024 GB
PB := 1024 TB
symbol_size := 4 B
image_size := 500 KB
# Пользователи
username_symbols := 30
user_bio_symbols := 255
user_size := (username_symbols + user_bio_symbols)*symbol_size + image_size = 501.113 KB
user_traffic_create := user_size*user_rate_create = 7.75889 Mbit/s
user_traffic_read := user_size*user_rate_read = 1.19475 Gbit/s
user_traffic := user_traffic_create + user_traffic_read = 1.20232 Gbit/s
user_traffic = 12.6808 TB/day
2*user_traffic = 2.40465 Gbit/s
# Вопросы
question_symbols := 120
question_size := question_symbols*symbol_size = 480 B
question_traffic_create := question_size*question_rate_create = 38.8889 B/s
question_traffic_read := question_size*question_rate_read = 439.453 KB/s
question_traffic := question_traffic_create + question_traffic_read = 439.491 KB/s
question_traffic = 3.43352 Mbit/s
question_traffic = 36.213 GB/day
# Ответы
answer_symbols := 918
answer_images := 0.6
answer_size := answer_symbols*symbol_size + answer_images*image_size = 303.586 KB
answer_traffic_create := answer_size*answer_rate_create = 122.98 KB/s
answer_traffic_read := answer_size*answer_rate_read = 1.35713 GB/s
answer_traffic := answer_traffic_create + answer_traffic_read = 1.35725 GB/s
answer_traffic = 10.858 Gbit/s
answer_traffic = 114.518 TB/day
2*answer_traffic = 21.716 Gbit/s
# Посты
post_symbols := 968
post_images := 1.8
post_size := post_symbols*symbol_size + post_images*image_size = 903.781 KB
post_traffic_create := post_size*post_rate_create = 73.223 KB/s
post_traffic_read := post_size*post_rate_read = 3.77087 GB/s
post_traffic := post_traffic_create + post_traffic_read = 3.77094 GB/s
post_traffic = 30.1675 Gbit/s
post_traffic = 318.173 TB/day
2*post_traffic = 60.335 Gbit/s
# Оценки
vote_size_create := 512 B
vote_size_read := 20 B
vote_traffic_create := vote_size_create*votes_rate_create = 63.0122 KB/s
vote_traffic_read := vote_size_read*votes_rate_read = 177.002 KB/s
vote_traffic := vote_traffic_create + vote_traffic_read = 240.014 KB/s
vote_traffic = 1.87511 Mbit/s
vote_traffic = 19.7766 GB/day
# Комментарии
comment_symbols := 87
comment_size := symbol_size*comment_symbols = 348 B
comment_traffic_create := comment_size*comment_rate_create = 4.10251 KB/s
comment_traffic_read := comment_size*comment_rate_read = 2.5928 MB/s
comment_traffic := comment_traffic_create + comment_traffic_read = 2.59681 MB/s
comment_traffic = 20.7745 Mbit/s
comment_traffic = 0.21397 TB/day
# Сообщества
space_name_length := 30
space_decription_length := 60
space_size := symbol_size*(space_name_length + space_decription_length) + image_size = 500.352 KB
space_traffic_create := space_size*space_rate_create = 0.991628 KB/s
space_traffic_read := space_size*space_rate_read = 2.08763 GB/s
space_traffic := space_traffic_create + space_traffic_read = 16.701 Gbit/s
space_traffic = 176.144 TB/day
2*space_traffic = 33.4021 Gbit/s
# Суммарный
traffic := user_traffic + question_traffic + answer_traffic + post_traffic + vote_traffic + comment_traffic + space_traffic = 58.9544 Gbit/s
traffic = 621.784 TB/day
peak_traffic := 2*traffic = 117.909 Gbit/s
# Расчет хранилищ
DB_grow_time := 10*365 day
# Пользователи
user_DB_grow := user_traffic_create = 29.1686 TB/(365 day)
user_DB_size := user_DB_grow*DB_grow_time = 291.686 TB
# Вопросы
question_DB_grow := question_traffic_create = 1.14217 GB/(365 day)
question_DB_size := question_DB_grow*DB_grow_time = 11.4217 GB
# Ответы
answer_DB_grow := answer_traffic_create = 3.61196 TB/(365 day)
answer_DB_size := answer_DB_grow*DB_grow_time = 36.1196 TB
# Посты
post_DB_grow := post_traffic_create = 2.15057 TB/(365 day)
post_DB_size := post_DB_grow*DB_grow_time = 21.5057 TB
# Комментарии
comment_DB_grow := comment_traffic_create = 123.383 GB/(365 day)
comment_DB_size := comment_DB_grow*DB_grow_time = 1.20492 TB
# Оценки
int_size := 4 B
vote_size_DB := int_size*4 = 16 B
vote_DB_grow := vote_size_DB*RPS_votes_create = 0.0578337 TB/(365 day)
vote_DB_size := vote_DB_grow*DB_grow_time = 0.578337 TB
# Сообщества
space_DB_grow := space_traffic_create = 29.8233 GB/(365*day)
space_DB_size := all_spaces*space_size = 1.1448 TB  # disabled
space_DB_size := space_traffic_create*DB_grow_time = 0.291243 TB
space_DB_grow := space_DB_size/DB_grow_time = 117.228 GB/(365*day)  # disabled
# Суммарно
DB_grow := user_DB_grow + question_DB_grow + answer_DB_grow + post_DB_grow + comment_DB_grow + vote_DB_grow + space_DB_grow = 35.1397 TB/(365 day)
DB_size := DB_grow*DB_grow_time = 351.397 TB
# Балансировка нагрузки
USA := 0.37
India := 0.25
Europe := 0.176
SEA := 0.06  # - Юго-восточная Азия
UnitedKingdom := 0.056
MENA := 0.05  # - Ближний Восток и Северная Африка
Canada := 0.037
ANZ := 0.027  # - Австралия
Japan := 0.017
Mexico := 0.0087
Brazil := 0.0065
# Доля пользователей по частям света
Северная_Америка := USA + Canada + Mexico = 0.4157
Азия := India + SEA + MENA + Japan = 0.377
Еврора := Europe + UnitedKingdom = 0.232
Австралия := ANZ = 0.027
Южная_Америка := Brazil = 0.0065
# Количесво ДЦ:
data_centers := 5
# Трафик на 1 ДЦ:
traffic_per_DC := peak_traffic/data_centers = 23.5817 Gbit/s
RPS_per_DC := RPS/data_centers = 1340.63 1/s
# Трафик на балансировщик:
balancers := 1
traffic_per_balancer := traffic_per_DC/balancers = 23.5817 Gbit/s
RPS_per_balancer := RPS_per_DC/balancers = 1340.63 1/s
SSL_size := 1 KB
SSL_traffic := SSL_size*RPS_per_balancer = 10.4737 Mbit/s
SSL_time := 50 ms = 0.05 s
cores := SSL_time*RPS_per_balancer = 67.0315
# Размер хранилища новый расчет
# Размер типов данных
int_size := 4 B
timestamp := 8 B
varchar_255_size := 256 B
Question_text_size := question_size = 480 B
Answer_text_size := answer_symbols*symbol_size = 3.58594 KB
Post_text_size := post_symbols*symbol_size = 3.78125 KB
Comment_text_size := symbol_size*comment_symbols = 348 B
# User:
User_row_size := int_size + varchar_255_size*4 + timestamp*2 = 1044 B
User_rows := all_users = 1000000000
User_size := User_row_size*User_rows = 972.301 GB
# Question:
Question_row_size := int_size*2 + Question_text_size + timestamp*2 = 504 B
Question_rows := question_rate_create*DB_grow_time = 25550000
Question_size := Question_row_size*Question_rows = 11.9928 GB
# Answer:
Answer_row_size := int_size*3 + Answer_text_size + timestamp*2 = 3700 B
Answer_rows := answer_rate_create*DB_grow_time = 127750000
Answer_size := Answer_row_size*Answer_rows = 440.213 GB
# Post:
Post_row_size := int_size*2 + Post_text_size + timestamp*2 = 3896 B
Post_rows := post_rate_create*DB_grow_time = 25550000
Post_size := Post_row_size*Post_rows = 92.7065 GB
# Comment:
Comment_row_size := int_size*3 + Comment_text_size + timestamp*2 = 376 B
Comment_rows := comment_rate_create*DB_grow_time = 3.80695e9
Comment_size := Comment_row_size*Comment_rows = 1.30186 TB
# PostVote:
PostVote_row_size := int_size*4 = 16 B
PostVote_rows := post_votes_rate_create*DB_grow_time = 29050350000
PostVote_size := PostVote_row_size*PostVote_rows = 432.884 GB
# AnswerVote:
AnswerVote_row_size := int_size*4 = 16 B
AnswerVote_rows := answer_votes_rate_create*DB_grow_time = 10692675000
AnswerVote_size := AnswerVote_row_size*AnswerVote_rows = 159.333 GB
# Space:
Space_row_size := int_size + varchar_255_size*2 + timestamp*2 = 532 B
Space_rows := all_spaces = 1000000
Space_size := Space_row_size*Space_rows = 507.355 MB
# File:
File_row_size := int_size*3 + varchar_255_size*2 + timestamp*2 = 540 B
File_rows := User_rows + Answer_rows*answer_images + Post_rows*post_images + Space_rows = 1123640000
File_size := File_row_size*File_rows = 565.095 GB
# Нагрузка на хранилище
# User:
User_create := RPS_user_create = 1.98186 1/s
User_read := RPS_user_read = 312.5 1/s
# Question:
Question_create := RPS_question_create = 0.0810185 1/s
Question_read := RPS_question_read = 937.5 1/s
# Answer:
Answer_create := RPS_answer_create = 0.405093 1/s
Answer_read := RPS_answer_read = 937.5 1/s
# Post:
Post_create := RPS_post_create = 0.0810185 1/s
Post_read := RPS_post_read = 625 1/s
# Comment:
Comment_create := RPS_comment_create = 12.0718 1/s
Comment_read := RPS_comment_read = 1562.5 1/s
# PostVote:
PostVote_create := RPS_post_votes_create = 92.1181 1/s
PostVote_read := RPS_post_votes_read = 625 1/s
# AnswerVote:
AnswerVote_create := RPS_answer_votes_create = 33.9062 1/s
AnswerVote_read := RPS_answer_votes_read = 937.5 1/s
# Space:
Space_create := RPS_space_create = 0.00198186 1/s
Space_read := RPS_space_read = 625 1/s
# File:
File_create := User_create + Answer_create*answer_images + Post_create*post_images + Space_create = 2.37273 1/s
File_read := User_read + Answer_read*answer_images + Post_read*post_images + Space_read = 2625 1/s
